# Дз2 НАЗАРУК Е.С | ДАНО A(3;-1;5) B(4;2-5) C(-4;0;3) D(1;0;-2)
A__ := [5; 7; -2]
B__ := [3; 1; -1]
C__ := [9; 4; -4]
det([1, -3, 0; 3, x, 1; 2, -4, 3]) → 3*x + 25
C_ := [-4; 0; 3]
# Дано A(1;-2) B(3;-1) C(-1;5)
A_ := [3; -1; 5]
D__ := [1; 5; 0]
AB := [2; 1]
|AB| = 2.23607
B_ := [4; 2; -5]
D_ := [1; 0; -2]
BC := [-4; 6]
|BC| = 7.2111
3*x + 25
AB__ := B__ - A__ = [-2; -6; 1]
AC__ := C__ - A__ = [4; -3; -2]
AC := [-2; 7]
|AC| = 7.28011
[25; 3]
polyroots([25; 3]) = -8.33333
AD__ := D__ - A__ = [-4; -2; 2]
AB_ := B_ - A_ = [1; 3; -10]
|AB_| = 10.4881
AM := AC - BC/2 = [0; 4]
|AM| = 4
cosBAM := AB*AM/(|AB|*|AM|) = 0.447214
AB__×AC__*AD__ = 0  # Следовательно ,вектора лежат в одной плоскости
AD_ := D_ - A_ = [-2; 1; -7]
|AD_| = 7.34847
sinBAM := sqrt(1 - cosBAM^2) = 0.894427
AC_ := C_ - A_ = [-7; 1; -2]
|AC_| = 7.34847
Sabc := |AB|*|AC|*sinBAM/2 = 7.28011
BC_ := C_ - B_ = [-8; -2; 8]
|BC_| = 11.4891
AH := 2*Sabc/|BC| = 2.01914
Sabc_ := 1*AB_×AC_/2 = [2; 36; 11]
|Sabc_| = 37.6962
cosBAC := AB*AC/(|AB|*|AC|) = 0.184289
V_ := AB_×AC_*AD_/6 = -15
H_ := 3*|V_|/|Sabc_| = 1.19376
